*Heading
** Job name: Job_Analysis_uni_3 Model name: Analysis_uni_3
** Generated by: Abaqus/CAE 6.14-1
*Preprint, echo=NO, model=NO, history=NO, contact=NO
** ----------------------------------------------------------------
**
** PART INSTANCE: MatrixInst
**
*Node
      1,           0.,           0.,           1.
      2,           1.,           0.,           1.
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*Element, type=C3D4
    1, 4033, 4034, 4035, 4036
    2, 4037, 4034, 4038, 4036
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*Nset, nset=MatrixInst_SetJob_uni_3_Analysis_uni_3_Pha~1, generate
    1,  5638,     1
*Elset, elset=MatrixInst_SetJob_uni_3_Analysis_uni_3_Pha~1, generate
     1,  21768,      1
*Nset, nset=MatrixInst_SetMatrix, generate
    1,  5638,     1
*Elset, elset=MatrixInst_SetMatrix, generate
     1,  21768,      1
** Section: matrix_Section
*Solid Section, elset=MatrixInst_SetJob_uni_3_Analysis_uni_3_Pha~1, material=matrix
,
** ----------------------------------------------------------------
**
** PART INSTANCE: Phase2_1
**
*Node
   5639,          0.5, 0.0429218486, 0.0429218486
   5640,          0.5,  0.957078159, 0.0429218486
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*Element, type=C3D10M
21769,  7024,  6058,  7272,  6057,  8733,  8732,  8731,  8735,  8734,  8736
21770,  7273,  7274,  7275,  7276,  8739,  8738,  8737,  8741,  8740,  8742
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*Nset, nset=Phase2_1_SetPhase2_1, generate
  5639,  26527,      1
*Elset, elset=Phase2_1_SetPhase2_1, generate
 21769,  34843,      1
*Orientation, name=Phase2_1-Ori-1
          0.,           0.,          -1.,          -1.,           0.,           0.
1, 0.
** Section: CF_Section
*Solid Section, elset=Phase2_1_SetPhase2_1, orientation=Phase2_1-Ori-1, material=CF
,
*System
*Node
  26528,   1.10000002,          0.5,          0.5
*Node
  26529,          0.5,   1.10000002,          0.5
*Node
  26530,          0.5,          0.5,   1.10000002
*Nset, nset=Phase2, generate
  5639,  26527,      1
*Elset, elset=Phase2, generate
 21769,  34843,      1
*Nset, nset=allRVE, generate
    1,  5638,     1
*Nset, nset=allRVE, generate
  5639,  26527,      1
*Elset, elset=allRVE, generate
     1,  21768,      1
*Elset, elset=allRVE, generate
 21769,  34843,      1
*Nset, nset=point1
 7,
*Nset, nset=point2
 1,
*Nset, nset=point3
 4,
*Nset, nset=point4
 5,
*Nset, nset=point5
 8,
*Nset, nset=point6
 2,
*Nset, nset=point7
 3,
*Nset, nset=point8
 6,
*Nset, nset=refpoint4
26528,
*Nset, nset=refpoint5
26529,
*Nset, nset=refpoint6
26530,
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*Nset, nset=xinfNoEdges, generate
 1090,  1450,     1
*Elset, elset=xinfNoEdges
   953,  1183,  1252,  1320,  2055,  2108
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*Nset, nset=xparEdge1, generate
 201,  219,    1
*Elset, elset=xparEdge1
  1608,  1639,  2061,  3065,  3591,  4217
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*Nset, nset=xparEdge2, generate
 11,  29,   1
*Elset, elset=xparEdge2
   782,   784,   955,  1023,  1062,  1291
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*Nset, nset=xparEdge3, generate
 49,  67,   1
*Elset, elset=xparEdge3
   961,  1011,  1082,  1240,  1254,  3705
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*Nset, nset=xparEdge4, generate
 125,  143,    1
*Elset, elset=xparEdge4
  1157,  1364,  1461,  2133,  3522,  4005
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*Nset, nset=xsupNoEdges, generate
 1812,  2172,     1
*Elset, elset=xsupNoEdges
    53,    57,   158,   270,   441,   807
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*Nset, nset=yinfNoEdges, generate
 1451,  1811,     1
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*Nset, nset=yparEdge1, generate
 220,  238,    1
*Elset, elset=yparEdge1
  4436,  5016,  5136,  5561,  5615,  5632
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*Nset, nset=yparEdge2, generate
 163,  181,    1
*Elset, elset=yparEdge2
  1364,  1602,  3847,  5317,  5941,  6784
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*Nset, nset=yparEdge3, generate
 68,  86,   1
*Elset, elset=yparEdge3
  1252,  2385,  2539,  2826,  2990,  5725
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*Nset, nset=yparEdge4, generate
 30,  48,   1
*Elset, elset=yparEdge4
  2393,  2641,  5594,  5645,  5886,  5899
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*Nset, nset=ysupNoEdges, generate
  729,  1089,     1
*Elset, elset=ysupNoEdges
   180,   199,   578,  1072,  1082,  1157
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*Nset, nset=zinfNoEdges, generate
 2173,  2533,     1
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*Nset, nset=zparEdge1, generate
  87,  105,    1
*Elset, elset=zparEdge1
  1183,  1254,  1334,  1365,  2455,  2865
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*Nset, nset=zparEdge2, generate
 144,  162,    1
*Elset, elset=zparEdge2
   589,  1320,  2990,  3091,  3122,  3278
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*Nset, nset=zparEdge3, generate
 182,  200,    1
*Elset, elset=zparEdge3
   845,  1198,  1369,  2641,  2642,  3287
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*Nset, nset=zparEdge4, generate
 106,  124,    1
*Elset, elset=zparEdge4
    53,   807,   984,  1940,  3557,  4765
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*Nset, nset=zsupNoEdges, generate
 368,  728,    1
*Elset, elset=zsupNoEdges
    88,   262,   335,   454,   782,   961
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*Elset, elset=_Matrix_1_S1
   116,   300,   349,   602,  1900,  2116
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*Elset, elset=_Matrix_1_S2
   341,   436,   439,   484,   595,   691
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*Elset, elset=_Matrix_1_S4
    66,    76,   178,   193,   204,   355
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*Elset, elset=_Matrix_1_S3
    98,   109,   110,   146,   230,   234
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*Surface, type=ELEMENT, name=Matrix_1
_Matrix_1_S1, S1
_Matrix_1_S2, S2
_Matrix_1_S4, S4
_Matrix_1_S3, S3
*Elset, elset=_Surf_Phase2_1_S3
 21792, 21831, 21839, 21946, 21979, 21985
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*Elset, elset=_Surf_Phase2_1_S2
 21865, 22999, 24273, 24560, 24654, 24841
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*Elset, elset=_Surf_Phase2_1_S4
 22643, 22999, 23067, 23246, 23359, 23431
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*Elset, elset=_Surf_Phase2_1_S1
 22366, 22898, 23367, 23509, 23939, 24114
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*Surface, type=ELEMENT, name=Surf_Phase2_1
_Surf_Phase2_1_S3, S3
_Surf_Phase2_1_S2, S2
_Surf_Phase2_1_S4, S4
_Surf_Phase2_1_S1, S1
** Constraint: Eq1
*Equation
3
point2, 1, 1.
point3, 1, -1.
refpoint5, 1, 1.
** Constraint: Eq2
*Equation
3
point3, 1, 1.
point4, 1, -1.
refpoint6, 1, -1.
** Constraint: Eq3
*Equation
3
point4, 1, 1.
point8, 1, -1.
refpoint4, 1, 1.
** Constraint: Eq4
*Equation
3
point8, 1, 1.
point5, 1, -1.
refpoint5, 1, -1.
** Constraint: Eq5
*Equation
3
point5, 1, 1.
point6, 1, -1.
refpoint6, 1, 1.
** Constraint: Eq6
*Equation
3
point6, 1, 1.
point7, 1, -1.
refpoint5, 1, 1.
** Constraint: Eq7
*Equation
5
point7, 1, 1.
point1, 1, -1.
refpoint4, 1, -1.
refpoint5, 1, -1.
refpoint6, 1, -1.
** Constraint: Eq8
*Equation
3
point2, 2, 1.
point3, 2, -1.
refpoint5, 2, 1.
** Constraint: Eq9
*Equation
3
point3, 2, 1.
point4, 2, -1.
refpoint6, 2, -1.
** Constraint: Eq10
*Equation
3
point4, 2, 1.
point8, 2, -1.
refpoint4, 2, 1.
** Constraint: Eq11
*Equation
3
point8, 2, 1.
point5, 2, -1.
refpoint5, 2, -1.
** Constraint: Eq12
*Equation
3
point5, 2, 1.
point6, 2, -1.
refpoint6, 2, 1.
** Constraint: Eq13
*Equation
3
point6, 2, 1.
point7, 2, -1.
refpoint5, 2, 1.
** Constraint: Eq14
*Equation
5
point7, 2, 1.
point1, 2, -1.
refpoint4, 2, -1.
refpoint5, 2, -1.
refpoint6, 2, -1.
** Constraint: Eq15
*Equation
3
point2, 3, 1.
point3, 3, -1.
refpoint5, 3, 1.
** Constraint: Eq16
*Equation
3
point3, 3, 1.
point4, 3, -1.
refpoint6, 3, -1.
** Constraint: Eq17
*Equation
3
point4, 3, 1.
point8, 3, -1.
refpoint4, 3, 1.
** Constraint: Eq18
*Equation
3
point8, 3, 1.
point5, 3, -1.
refpoint5, 3, -1.
** Constraint: Eq19
*Equation
3
point5, 3, 1.
point6, 3, -1.
refpoint6, 3, 1.
** Constraint: Eq20
*Equation
3
point6, 3, 1.
point7, 3, -1.
refpoint5, 3, 1.
** Constraint: Eq21
*Equation
5
point7, 3, 1.
point1, 3, -1.
refpoint4, 3, -1.
refpoint5, 3, -1.
refpoint6, 3, -1.
** Constraint: Tie1
*ncopy, change number = 26627, old set=xsupNoEdges, new set=xsupCopy, reflect=mirror
0.5, 0, 0, 0.5, 1.0, 0
0.5, 0, 1.0
*ncopy, change number = 53254, old set=ysupNoEdges, new set=ysupCopy, reflect=mirror
0, 0.5, 0, 1.0, 0.5, 0
0, 0.5, 1.0
*ncopy, change number = 79881, old set=zsupNoEdges, new set=zsupCopy, reflect=mirror
0, 0, 0.5, 1.0, 0, 0.5
0, 1.0, 0.5
*ncopy, change number = 106508, old set=yparEdge1, new set=yparEdge1CopyTo2, reflect=mirror
0.5, 0, 0, 0.5, 1.0, 0
0.5, 0, 1.0
*ncopy, change number = 133135, old set=yparEdge4, new set=yparEdge4CopyTo3, reflect=mirror
0.5, 0, 0, 0.5, 1.0, 0
0.5, 0, 1.0
*ncopy, change number = 159762, old set=zparEdge3, new set=zparEdge3CopyTo2, reflect=mirror
0.5, 0, 0, 0.5, 1.0, 0
0.5, 0, 1.0
*ncopy, change number = 186389, old set=zparEdge4, new set=zparEdge4CopyTo1, reflect=mirror
0.5, 0, 0, 0.5, 1.0, 0
0.5, 0, 1.0
*ncopy, change number = 213016, old set=xparEdge3, new set=xparEdge3CopyTo2, reflect=mirror
0, 0.5, 0, 1.0, 0.5, 0
0, 0.5, 1.0
*ncopy, change number = 239643, old set=xparEdge4, new set=xparEdge4CopyTo1, reflect=mirror
0, 0.5, 0, 1.0, 0.5, 0
0, 0.5, 1.0
*ncopy, change number = 266270, old set=zparEdge1, new set=zparEdge1CopyTo2, reflect=mirror
0, 0.5, 0, 1.0, 0.5, 0
0, 0.5, 1.0
*ncopy, change number = 292897, old set=zparEdge4, new set=zparEdge4CopyTo3, reflect=mirror
0, 0.5, 0, 1.0, 0.5, 0
0, 0.5, 1.0
*ncopy, change number = 319524, old set=yparEdge3, new set=yparEdge3CopyTo2, reflect=mirror
0, 0, 0.5, 1.0, 0, 0.5
0, 1.0, 0.5
*ncopy, change number = 346151, old set=yparEdge4, new set=yparEdge4CopyTo1, reflect=mirror
0, 0, 0.5, 1.0, 0, 0.5
0, 1.0, 0.5
*ncopy, change number = 372778, old set=xparEdge2, new set=xparEdge2CopyTo1, reflect=mirror
0, 0, 0.5, 1.0, 0, 0.5
0, 1.0, 0.5
*ncopy, change number = 399405, old set=xparEdge4, new set=xparEdge4CopyTo3, reflect=mirror
0, 0, 0.5, 1.0, 0, 0.5
0, 1.0, 0.5
*surface, name=copySurfXinf, type=node
xsupCopy
*surface, name=surfXinf, type=node
xinfNoEdges
*surface, name=copySurfYinf, type=node
ysupCopy
*surface, name=surfYinf, type=node
yinfNoEdges
*surface, name=copySurfZinf, type=node
zsupCopy
*surface, name=surfZinf, type=node
zinfNoEdges
*surface, name=surfxparEdge1, type=node
xparEdge1
*surface, name=surfxparEdge2, type=node
xparEdge2
*surface, name=surfxparEdge3, type=node
xparEdge3
*surface, name=surfxparEdge4, type=node
xparEdge4
*surface, name=surfxparEdge3CopyTo2, type=node
xparEdge3CopyTo2
*surface, name=surfxparEdge4CopyTo1, type=node
xparEdge4CopyTo1
*surface, name=surfxparEdge2CopyTo1, type=node
xparEdge2CopyTo1
*surface, name=surfxparEdge4CopyTo3, type=node
xparEdge4CopyTo3
*surface, name=surfyparEdge1, type=node
yparEdge1
*surface, name=surfyparEdge2, type=node
yparEdge2
*surface, name=surfyparEdge3, type=node
yparEdge3
*surface, name=surfyparEdge4, type=node
yparEdge4
*surface, name=surfyparEdge1CopyTo2, type=node
yparEdge1CopyTo2
*surface, name=surfyparEdge4CopyTo3, type=node
yparEdge4CopyTo3
*surface, name=surfyparEdge3CopyTo2, type=node
yparEdge3CopyTo2
*surface, name=surfyparEdge4CopyTo1, type=node
yparEdge4CopyTo1
*surface, name=surfzparEdge1, type=node
zparEdge1
*surface, name=surfzparEdge2, type=node
zparEdge2
*surface, name=surfzparEdge3, type=node
zparEdge3
*surface, name=surfzparEdge4, type=node
zparEdge4
*surface, name=surfzparEdge3CopyTo2, type=node
zparEdge3CopyTo2
*surface, name=surfzparEdge4CopyTo1, type=node
zparEdge4CopyTo1
*surface, name=surfzparEdge1CopyTo2, type=node
zparEdge1CopyTo2
*surface, name=surfzparEdge4CopyTo3, type=node
zparEdge4CopyTo3
*Tie, name=Tie-X, tied nset=xsupCopy, adjust=no, type=SURFACE TO SURFACE
copySurfXinf,surfXinf
*Tie, name=Tie-Y, tied nset=ysupCopy, adjust=no, type=SURFACE TO SURFACE
copySurfYinf,surfYinf
*Tie, name=Tie-Z, tied nset=zsupCopy, adjust=no, type=SURFACE TO SURFACE
copySurfZinf,surfZinf
*Tie, name=TieX1, tied nset=xparEdge3CopyTo2, adjust=no, type=SURFACE TO SURFACE
surfxparEdge3CopyTo2, surfxparEdge2
*Tie, name=TieX2, tied nset=xparEdge4CopyTo1, adjust=no, type=SURFACE TO SURFACE
surfxparEdge4CopyTo1, surfxparEdge1
*Tie, name=TieX3, tied nset=xparEdge2CopyTo1, adjust=no, type=SURFACE TO SURFACE
surfxparEdge2CopyTo1, surfxparEdge1
*Tie, name=TieX4, tied nset=xparEdge4CopyTo3, adjust=no, type=SURFACE TO SURFACE
surfxparEdge4CopyTo3, surfxparEdge3
*Tie, name=TieY1, tied nset=yparEdge1CopyTo2, adjust=no, type=SURFACE TO SURFACE
surfyparEdge1CopyTo2, surfyparEdge2
*Tie, name=TieY2, tied nset=yparEdge4CopyTo3, adjust=no, type=SURFACE TO SURFACE
surfyparEdge4CopyTo3, surfyparEdge3
*Tie, name=TieY3, tied nset=yparEdge3CopyTo2, adjust=no, type=SURFACE TO SURFACE
surfyparEdge3CopyTo2, surfyparEdge2
*Tie, name=TieY4, tied nset=yparEdge4CopyTo1, adjust=no, type=SURFACE TO SURFACE
surfyparEdge4CopyTo1, surfyparEdge1
*Tie, name=TieZ1, tied nset=zparEdge3CopyTo2, adjust=no, type=SURFACE TO SURFACE
surfzparEdge3CopyTo2, surfzparEdge2
*Tie, name=TieZ2, tied nset=zparEdge4CopyTo1, adjust=no, type=SURFACE TO SURFACE
surfzparEdge4CopyTo1, surfzparEdge1
*Tie, name=TieZ3, tied nset=zparEdge1CopyTo2, adjust=no, type=SURFACE TO SURFACE
surfzparEdge1CopyTo2, surfzparEdge2
*Tie, name=TieZ4, tied nset=zparEdge4CopyTo3, adjust=no, type=SURFACE TO SURFACE
surfzparEdge4CopyTo3, surfzparEdge3
*Equation
3
xsupNoEdges, 1, 1
xsupCopy,1, -1
refpoint4, 1, -1
*Equation
3
ysupNoEdges, 1, 1
ysupCopy,1, -1
refpoint5, 1, -1
*Equation
3
zsupNoEdges, 1, 1
zsupCopy,1, -1
refpoint6, 1, -1
*Equation
3
xsupNoEdges, 2, 1
xsupCopy,2, -1
refpoint4, 2, -1
*Equation
3
ysupNoEdges, 2, 1
ysupCopy,2, -1
refpoint5, 2, -1
*Equation
3
zsupNoEdges, 2, 1
zsupCopy,2, -1
refpoint6, 2, -1
*Equation
3
xsupNoEdges, 3, 1
xsupCopy,3, -1
refpoint4, 3, -1
*Equation
3
ysupNoEdges, 3, 1
ysupCopy,3, -1
refpoint5, 3, -1
*Equation
3
zsupNoEdges, 3, 1
zsupCopy,3, -1
refpoint6, 3, -1
*Equation
3
xparEdge2, 1, 1
xparEdge2CopyTo1,1, -1
refpoint6, 1, -1
*Equation
3
xparEdge3, 1, 1
xparEdge3CopyTo2,1, -1
refpoint5, 1, -1
*Equation
3
xparEdge4, 1, 1
xparEdge4CopyTo3,1, -1
refpoint6, 1, 1
*Equation
3
xparEdge2, 2, 1
xparEdge2CopyTo1,2, -1
refpoint6, 2, -1
*Equation
3
xparEdge3, 2, 1
xparEdge3CopyTo2,2, -1
refpoint5, 2, -1
*Equation
3
xparEdge4, 2, 1
xparEdge4CopyTo3,2, -1
refpoint6, 2, 1
*Equation
3
xparEdge2, 3, 1
xparEdge2CopyTo1,3, -1
refpoint6, 3, -1
*Equation
3
xparEdge3, 3, 1
xparEdge3CopyTo2,3, -1
refpoint5, 3, -1
*Equation
3
xparEdge4, 3, 1
xparEdge4CopyTo3,3, -1
refpoint6, 3, 1
*Equation
3
yparEdge1, 1, 1
yparEdge1CopyTo2,1, -1
refpoint4, 1, -1
*Equation
3
yparEdge3, 1, 1
yparEdge3CopyTo2,1, -1
refpoint6, 1, -1
*Equation
3
yparEdge4, 1, 1
yparEdge4CopyTo3,1, -1
refpoint4, 1, -1
*Equation
3
yparEdge1, 2, 1
yparEdge1CopyTo2,2, -1
refpoint4, 2, -1
*Equation
3
yparEdge3, 2, 1
yparEdge3CopyTo2,2, -1
refpoint6, 2, -1
*Equation
3
yparEdge4, 2, 1
yparEdge4CopyTo3,2, -1
refpoint4, 2, -1
*Equation
3
yparEdge1, 3, 1
yparEdge1CopyTo2,3, -1
refpoint4, 3, -1
*Equation
3
yparEdge3, 3, 1
yparEdge3CopyTo2,3, -1
refpoint6, 3, -1
*Equation
3
yparEdge4, 3, 1
yparEdge4CopyTo3,3, -1
refpoint4, 3, -1
*Equation
3
zparEdge1, 1, 1
zparEdge1CopyTo2,1, -1
refpoint5, 1, -1
*Equation
3
zparEdge3, 1, 1
zparEdge3CopyTo2,1, -1
refpoint4, 1, -1
*Equation
3
zparEdge4, 1, 1
zparEdge4CopyTo3,1, -1
refpoint5, 1, -1
*Equation
3
zparEdge1, 2, 1
zparEdge1CopyTo2,2, -1
refpoint5, 2, -1
*Equation
3
zparEdge3, 2, 1
zparEdge3CopyTo2,2, -1
refpoint4, 2, -1
*Equation
3
zparEdge4, 2, 1
zparEdge4CopyTo3,2, -1
refpoint5, 2, -1
*Equation
3
zparEdge1, 3, 1
zparEdge1CopyTo2,3, -1
refpoint5, 3, -1
*Equation
3
zparEdge3, 3, 1
zparEdge3CopyTo2,3, -1
refpoint4, 3, -1
*Equation
3
zparEdge4, 3, 1
zparEdge4CopyTo3,3, -1
refpoint5, 3, -1
*Tie, name=Tie1, adjust=yes, type=SURFACE TO SURFACE
Surf_Phase2_1, Matrix_1
**
** MATERIALS
**
*Material, name=CF
*Density
1800.,
*Elastic, type=ENGINEERING CONSTANTS
15000.,     15000.,    230000.,        0.2, 0.00456522, 0.00456522,      6250.,     15000.
     15000.,
*Material, name=matrix
*Density
1100.,
*Elastic
4000., 0.35
**
** BOUNDARY CONDITIONS
**
** Name: BC-1 Type: Displacement/Rotation
*Boundary
point1, 1, 1
point1, 2, 2
point1, 3, 3
point1, 4, 4
point1, 5, 5
point1, 6, 6
** ----------------------------------------------------------------
**
** STEP: Step-1
**
*Step, name=Step-1, nlgeom=NO, inc=2
*Static
1., 1., 0.1, 1.
**
** BOUNDARY CONDITIONS
**
** Name: BC-3 Type: Displacement/Rotation
*Boundary
refpoint4, 2, 2
** Name: BC-7 Type: Displacement/Rotation
*Boundary
refpoint5, 3, 3
** Name: BC-8 Type: Displacement/Rotation
*Boundary
refpoint6, 1, 1
** Name: BC-10 Type: Displacement/Rotation
*Boundary
refpoint6, 3, 3, 0.03
**
** OUTPUT REQUESTS
**
*Restart, write, frequency=0
**
** FIELD OUTPUT: F-Output-1
**
*Output, field
*Node Output
RF, U
*Element Output, directions=YES
E, EVOL, IVOL, S
**
** HISTORY OUTPUT: H-Output-1
**
*Output, history, variable=PRESELECT
*End Step
